M := [
    0.175, 0.167, 0.246, 0.412, 0.444, 0.388;
    0.525, 0.167, 0.246, 0.115, 0.049, 0.171;
    0.042, 0.167, 0.086, 0.025, 0.1, 0.076;
    0.042, 0.167, 0.043, 0.074, 0.027, 0.028;
    0.175, 0.167, 0.133, 0.187, 0.152, 0.076;
    0.042, 0.167, 0.246, 0.187, 0.228, 0.261
]
V := [0.103; 0.162; 0.067; 0.034; 0.381; 0.253]
GP := M*V
GP = [0.342897; 0.163453; 0.09532; 0.054148; 0.137488; 0.207121]
