M := [1, 3, 5, 7; 1/3, 1, 3, 5; 1/5, 1/3, 1, 3; 1/7, 1/5, 1/3, 1]
C_i := [
    product(M[0, i]^(1/4), i = 0 .. 3);
    product(M[1, i]^(1/4), i = 0 .. 3);
    product(M[2, i]^(1/4), i = 0 .. 3);
    product(M[3, i]^(1/4), i = 0 .. 3)
]
C_i = [3.20109; 1.49535; 0.66874; 0.312394]
C := sum(C_i[i], i = 0 .. 3)
C = 5.67757
V := C_i/C
V = [0.563813; 0.263378; 0.117786; 0.0550225]
R_i := transpose([sum(M[i, 0], i = 0 .. 3), sum(M[i, 1], i = 0 .. 3), sum(M[i, 2], i = 0 .. 3), sum(M[i, 3], i = 0 .. 3)])
R_i = [1.67619; 4.53333; 9.33333; 16]
lambda := sum(R_i[i]*V[i], i = 0 .. 3)
lambda = 4.11874
CC := 0.9
IC := (lambda - 4)/3
IC = 0.0395796
OC := IC/CC
OC = 0.0439774
