M := [
    1, 3, 5, 8, 5, 2;
    1/3, 1, 3, 6, 3, 1/2;
    1/5, 1/3, 1, 4, 1, 1/4;
    1/8, 1/6, 1/4, 1, 1/4, 1/7;
    1/5, 1/3, 1, 4, 1, 1/4;
    1/2, 2, 4, 7, 4, 1
]
C_i := [
    product(M[0, i]^(1/6), i = 0 .. 5);
    product(M[1, i]^(1/6), i = 0 .. 5);
    product(M[2, i]^(1/6), i = 0 .. 5);
    product(M[3, i]^(1/6), i = 0 .. 5);
    product(M[4, i]^(1/6), i = 0 .. 5);
    product(M[5, i]^(1/6), i = 0 .. 5)
]
C_i = [3.25984; 1.44225; 0.636773; 0.238922; 0.636773; 2.19551]
C := sum(C_i[i], i = 0 .. 5)
C = 8.41008
V := C_i/C
V = [0.387612; 0.171491; 0.0757155; 0.0284091; 0.0757155; 0.261058]
R_i := transpose([sum(M[i, 0], i = 0 .. 5), sum(M[i, 1], i = 0 .. 5), sum(M[i, 2], i = 0 .. 5), sum(M[i, 3], i = 0 .. 5), sum(M[i, 4], i = 0 .. 5), sum(M[i, 5], i = 0 .. 5)])
R_i = [2.35833; 6.83333; 14.25; 30; 14.25; 4.14286]
lambda := sum(R_i[i]*V[i], i = 0 .. 5)
lambda = 6.17766
CC := 1.24
IC := (lambda - 6)/5
IC = 0.0355316
OC := IC/CC
OC = 0.0286545
